V1 := [-33.73; -37.40; -17.43]
V2 := [-11.26; -27.65; -14.80]
PView := [-17.61; -18.44; -32.37]
scal := V1*V2 = 1671.87
vec := V1×V2 = [71.5805; -302.942; 511.51]
mod1 := |V1| = 53.2943
mod2 := |V2| = 33.3219
cos1 := V1*V2/(|V1|*|V2|) = 0.941441
R[0] := PView[0]*cos(PView[1])*sin(PView[2])
R[1] := PView[0]*sin(PView[1])*sin(PView[2])
R[2] := PView[0]*cos(PView[2])
Rs := [R[0]; R[1]; R[2]] = [13.1778; 5.72051; -10.185]
