Xa := -2
Xb := -3
Xc := 0
Xd := 3
Xe := 2
Xf := -2
Xh := 2
Ya := -4
Yb := 0
Yc := 4
Yd := 0
Ye := -4
Yf := 0
Yh := 0
Xlw := 100
Ylw := 200
Xgw := 400
Ygw := 500
Zx := transpose([Xa, Xb, Xc, Xd, Xe, Xf, Xh])
Zy := transpose([Ya, Yb, Yc, Yd, Ye, Yf, Yh])
Xl := min(Zx) = -3
Xg := max(Zx) = 3
Yg := max(Zy) = 4
Yl := min(Zy) = -4
# Вычисляем параметры, необходимые для формирования матрицы пересчета координат из МСК в ОСК
qXw := Xgw - Xlw = 300
qX := Xg - Xl = 6
qYw := Ygw - Ylw = 300
qY := Yg - Yl = 8
Kx := qXw/qX = 50
Ky := qYw/qY = 37.5
# Матрица пересчетов из МСК в ОСК
Tsw := [Kx, 0, Xlw - Kx*Xl; 0, -Ky, Ygw + Ky*Yl; 0, 0, 1]
# Вычисляем координаты в ОСК
[Xaw; Yaw; q] := Tsw*[Xa; Ya; 1]
[Xbw; Ybw; q] := Tsw*[Xb; Yb; 1]
[Xcw; Ycw; q] := Tsw*[Xc; Yc; 1]
[Xdw; Ydw; q] := Tsw*[Xd; Yd; 1]
[Xew; Yew; q] := Tsw*[Xe; Ye; 1]
[Xfw; Yfw; q] := Tsw*[Xf; Yf; 1]
[Xhw; Yhw; q] := Tsw*[Xh; Yh; 1]
[Xaw; Yaw; q] = [150; 500; 1]
[Xhw; Yhw; q] = [350; 350; 1]
[Xcw; Ycw; q] = [250; 200; 1]
[Xbw; Ybw; q] = [100; 350; 1]
[Xdw; Ydw; q] = [400; 350; 1]
[Xew; Yew; q] = [350; 500; 1]
[Xfw; Yfw; q] = [150; 350; 1]
Xw := transpose([Xbw, Xcw, Xdw, Xbw, Xfw, Xaw, Xew, Xhw, Xdw])
Yw := -transpose([Ybw, Ycw, Ydw, Ybw, Yfw, Yaw, Yew, Yhw, Ydw])
Y := transpose([Yb, Yc, Yd, Yb, Yf, Ya, Ye, Yh, Yd])
X := transpose([Xb, Xc, Xd, Xb, Xf, Xa, Xe, Xh, Xd])
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