# Задание 1
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# Координаты точек
A(4, 7)
B(8, 14)
C(12, 6)
x1 := 4
x2 := 8
x3 := 12
y1 := 7
y2 := 14
y3 := 6
# Точка пересечения медиан
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xBCm := (12 + 8)/2 = 10
yBCm := (14 + 6)/2 = 10
x0 := (1*x1 + 2*xBCm)/(2 + 1) = 8
y0 := (1*y1 + 2*yBCm)/(2 + 1) = 9
# Новые координаты точек
# Матрица поворота системы координат М:
M := [cos(π), -sin(π); sin(π), cos(π)]
Ap := M*[x1 - x0; y1 - y0] + [x0; y0] = [12; 11]
Bp := M*[x2 - x0; y2 - y0] + [x0; y0] = [8; 4]
Cp := M*[x3 - x0; y3 - y0] + [x0; y0] = [4; 12]
# График
MabP := transpose([12, 8; 11, 4])
MbcP := transpose([8, 4; 4, 12])
McaP := transpose([4, 12; 12, 11])
Mab := transpose([4, 8; 7, 14])
Mbc := transpose([8, 12; 14, 6])
Mca := transpose([12, 4; 6, 7])
xabP := MabP[:, 0]
xbcP := MbcP[:, 0]
xcaP := McaP[:, 0]
xab := Mab[:, 0]
xbc := Mbc[:, 0]
xca := Mca[:, 0]
yabP := MabP[:, 1]
ybcP := MbcP[:, 1]
ycaP := McaP[:, 1]
yab := Mab[:, 1]
ybc := Mbc[:, 1]
yca := Mca[:, 1]
# Верхняя строка - абсциссы вершин отрезка, нижняя - ординаты
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