xINDEX := -20 .. 40  # Задание 11
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# Координаты точек
A(5, 5)
B(10, 10)
C(15, 1)
E(3, 2)
D(16, 5)
x1 := 5
x2 := 10
x3 := 15
x4 := 3
x5 := 16
y1 := 5
y2 := 10
y3 := 1
y4 := 2
y5 := 5
a1 := (y2 - y1)/(x2 - x1) = 1
a2 := (y3 - y1)/(x3 - x1) = -0.4
a3 := (y3 - y2)/(x3 - x2) = -1.8
b1 := x1 - a1*y1 = 0
b2 := x1 - a2*y1 = 7
b3 := x2 - a3*y2 = 28
fAB(xINDEX) := a1*xINDEX + b1
fAC(xINDEX) := a2*xINDEX + b2
fBC(xINDEX) := a3*xINDEX + b3
a4 := (y5 - y4)/(x5 - x4) = 0.230769
b4 := x4 - a4*y4 = 2.53846
fED(xINDEX) := a4*xINDEX + b4
# Точка пересечения прямых
xx := 0
fABED(xx) := fED(xx) - fAB(xx)
fACED(xx) := fED(xx) - fAC(xx)
x0ABED := root(fABED(xx), xx) = 3.3
x0ACED := root(fACED(xx), xx) = 7.07317
y0ABED := fED(x0ABED) = 3.3
y0ACED := fED(x0ACED) = 4.17073
fBCED(xx) := fED(xx) - fBC(xx)
x0BCED := root(fBCED(xx), xx) = 12.5379
y0BCED := fED(x0BCED) = 5.43182
# График
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