A(-5, 0, 0)
B(0, -10, 0)
C(0, 0, -20)
[x2; y2; z2] := [0; -10; 0]
[x3; y3; z3] := [0; 0; -20]
[x1; y1; z1] := [-5; 0; 0]
B := [x2; y2; z2]
C := [x3; y3; z3]
A := [x1; y1; z1]
aroundCS := π/3
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# Новые координаты точек
# Координаты точек
# Поворот вокруг оси X:
# Задание 12
aroundOBJ := π/6
M1 := [1, 0, 0; 0, cos(aroundCS), sin(aroundCS); 0, -sin(aroundCS), cos(aroundCS)]
Bp1 := M1*B = [0; -5; 8.66025]
Ap1 := M1*A = [-5; 0; 0]
Cp1 := M1*C = [0; -17.3205; -10]
M2 := [cos(aroundOBJ), 0, sin(aroundOBJ); 0, 1, 0; -sin(aroundOBJ), 0, cos(aroundOBJ)]
Ap2 := M2*Ap1 = [-4.33013; 0; 2.5]
Bp2 := M2*Bp1 = [4.33013; -5; 7.5]
Cp2 := M2*Cp1 = [-5; -17.3205; -8.66025]
