# Задание 14
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# Задаем координаты вершин пирамиды и положения камеры:
PIR := [5, 0, 0, 0; 0, 0, 0, 20; 0, 10, 0, 0; 1, 1, 1, 1]
PV := [10; 45; 45]
# Получаем сферические координаты точки наблюдения:
r_v := PV[0] = 10
ϕ_v := PV[1]*π/180 = 0.785398
θ_v := PV[2]*π/180 = 0.785398
# Задаем положение секущей плоскости в МСК XYZ
# - вектор нормали к секущей плоскости
N := transpose([0, 1, 0])
# - координаты точки E
x_0 := 0
y_0 := 10
z_0 := 0
# Задаем параметры уравнения секущей плоскости
[A; B; C] := N
[A; B; C] = [0; 1; 0]
D := -(A*x_0 + B*y_0 + C*z_0)
D = -10
# Находим точку пересечения P4 секущей плоскости с ребром AD
V1 := submatrix(PIR, 0, 2, 0, 0) = [5; 0; 0]
V2 := submatrix(PIR, 0, 2, 3, 3) = [0; 20; 0]
ΔV := V2 - V1
t_AD := -((N*V1 + D)/(N*ΔV))
V_AD := V1 + ΔV*t_AD
x_AD := V_AD[0]
y_AD := V_AD[1]
z_AD := V_AD[2]  # - координаты точки пересечения Р4
# Находим точку пересечения P5 секущей плоскости с ребром BD
V1 := submatrix(PIR, 0, 2, 1, 1) = [0; 0; 10]
V2 := submatrix(PIR, 0, 2, 3, 3) = [0; 20; 0]
ΔV := V2 - V1
t_BD := -((N*V1 + D)/(N*ΔV))
V_BD := V1 + ΔV*t_BD
x_BD := V_BD[0]
y_BD := V_BD[1]
z_BD := V_BD[2]  # - координаты точки пересечения Р5
# Находим точку пересечения P6 секущей плоскости с ребром CD
V1 := submatrix(PIR, 0, 2, 2, 2) = [0; 0; 0]
V2 := submatrix(PIR, 0, 2, 3, 3) = [0; 20; 0]
ΔV := V2 - V1
t_CD := -((N*V1 + D)/(N*ΔV))
V_CD := V1 + ΔV*t_CD
x_CD := V_CD[0]
y_CD := V_CD[1]
z_CD := V_CD[2]  # - координаты точки пересечения Р6
# Получаем матрицу мировых коорднат точек P1, P2, P3, P4, P5, P6
# Формируем матрицу пересчета мировых координат в видовые
TR := [
    x_AB, x_BC, x_CA, x_AD, x_BD, x_CD;
    y_AB, y_BC, y_CA, y_AD, y_BD, y_CD;
    z_AB, z_BC, z_CA, z_AD, z_BD, z_CD;
    1, 1, 1, 1, 1, 1
]  # error: Эта переменная неопределена.
K_view := [
    -sin(ϕ_v), cos(ϕ_v), 0, 0;
    -cos(θ_v)*cos(ϕ_v), -cos(θ_v)*sin(ϕ_v), sin(θ_v), 0;
    -sin(θ_v)*cos(ϕ_v), -sin(θ_v)*sin(ϕ_v), -cos(θ_v), r_v;
    0, 0, 0, 1
]
TR := [x_AD, x_BD, x_CD; y_AD, y_BD, y_CD; z_AD, z_BD, z_CD; 1, 1, 1]
# Вычисляем координаты вершин пирамиды в видовой системе координат (ВСК)
PIR_V := K_view*PIR
# Вычисляем координаты вершин треугольника сечения Р1,
# Р2, Р3 в видовой системе координат (ВСК)
TR_V := K_view*TR
# Определяем координаты проекции вершин пирамиды на картинную плоскость
P_XY := stack(transpose(transpose(PIR_V)[:, 0]), transpose(transpose(PIR_V)[:, 1]), transpose(transpose(PIR_V)[:, 3]))
# Определяем координаты проекции вершин треугольника сечения Р1,
# Р2, Р3 на картинную плоскость
TR_XY := stack(transpose(transpose(TR_V)[:, 0]), transpose(transpose(TR_V)[:, 1]), transpose(transpose(TR_V)[:, 3]))
# Определяем габаритную область проекции пирамиды на плоскость XY ВСК – картинную плоскость
x_L := min(transpose(P_XY)[:, 0])
y_H := max(transpose(P_XY)[:, 1])
# – левый верхний угол
x_L = -3.53553
y_H = 7.07107
x_H := max(transpose(P_XY)[:, 0])
y_L := min(transpose(P_XY)[:, 1])  # – правый нижний угол
[x_a, x_b, x_c, x_e; y_a, y_b, y_c, y_e; q, q, q, q] := P_XY = [-3.53553, 0, 0, 14.1421; -2.5, 7.07107, 0, -10; 1, 1, 1, 1]
x_H = 14.1421
y_L = -10
# Формируем массивы координат X и Y для рисования пирамиды
[xp1, xp2, xp3; yp1, yp2, yp3; q, q, q] := TR_XY = [5.3033, 7.07107, 7.07107; -6.25, -1.46447, -5; 1, 1, 1]
X := transpose([x_a, x_b, x_c, x_a, x_e, x_c, x_e, x_b])
Y := transpose([y_a, y_b, y_c, y_a, y_e, y_c, y_e, y_b])
# Формируем массивы координат Х и У для рисования
# сечения пирамиды
[xP0; yP0; zP0; q] := K_view*[x_0; y_0; z_0; 1] = [7.07107; -5; 5; 1]
XC := transpose([xp1, xp2, xp3, xp1])
YC := transpose([yp1, yp2, yp3, yp1])
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