# Задание 17
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xINDEX := -20 .. 40
# Координаты точек
A(5, 5)
B(12, 12)
C(14, 3)
[x3; y3] := [14; 3]
[x1; y1] := [5; 5]
[x2; y2] := [12; 12]
B := [x2; y2]
A := [x1; y1]
C := [x3; y3]
a1 := (y2 - y1)/(x2 - x1) = 1
b1 := y1 - a1*x1 = 0
fAB(xINDEX) := a1*xINDEX + b1
a2 := -1/a1 = -1
b2 := y3 - a2*x3
fCD(xINDEX) := a2*xINDEX + b2
# Точка пересечения прямых
y := 0
x := 0
Given
y == a1*x + b1
y == a2*x + b2
[xP; yP] := Find(x, y) = [8.5; 8.5]
aroundCS := π/4
# Поворот системы вокруг точки D
M1 := [cos(aroundCS), sin(aroundCS); -sin(aroundCS), cos(aroundCS)]
[xR1; yR1] := M1*(A - [xP; yP]) + [xP; yP] = [3.55025; 8.5]
[xR2; yR2] := M1*(B - [xP; yP]) + [xP; yP] = [13.4497; 8.5]
[xR3; yR3] := M1*(C - [xP; yP]) + [xP; yP] = [8.5; 0.721825]
a1R := 0
a2R := 0
b1R := yP - a1R*xP = 8.5
b2R := yP - a2R*xP = 8.5
fABR(xINDEX) := a1R*xINDEX + b1R
fCDR(xINDEX) := a2R*xINDEX + b2R
xRG := b1R  # График
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fABR(xINDEX) = [
    8.5; 8.5; 8.5; 8.5; 8.5; 8.5; 8.5; 8.5; 8.5; 8.5
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]
