# Задание 18
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# Координаты точек
A(-8, 0, 0)
B(0, -10, 0)
C(0, 0, -20)
[x2; y2; z2] := [0; -7; 0]
[x3; y3; z3] := [0; 0; -10]
[x1; y1; z1] := [-8; 0; 0]
B := [x2; y2; z2]
C := [x3; y3; z3]
A := [x1; y1; z1]
# Новые координаты точек
aroundCS := π/3
# Поворот вокруг оси X ( по часовой стрелке):
aroundOBJ := π/3
M1 := [1, 0, 0; 0, cos(aroundCS), sin(aroundCS); 0, -sin(aroundCS), cos(aroundCS)]
Bp1 := M1*B = [0; -3.5; 6.06218]
Ap1 := M1*A = [-8; 0; 0]
Cp1 := M1*C = [0; -8.66025; -5]
# Поворот вокруг оси Z (против часовой стрелки) :
M2 := [cos(aroundOBJ), -sin(aroundOBJ), 0; sin(aroundOBJ), cos(aroundOBJ), 0; 0, 0, 1]
Ap2 := M2*Ap1 = [-4; -6.9282; 0]
Bp2 := M2*Bp1 = [3.03109; -1.75; 6.06218]
Cp2 := M2*Cp1 = [7.5; -4.33013; -5]
