xINDEX := -20 .. 40  # Задание 19
# Координаты точек
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C(x(AC == BC), 8)
A(4, 2)
B(16, 3)
[x1; y1] := [4; 2]
[x2; y2] := [16; 3]
A := [x1; y1]
B := [x2; y2]
xM := (x1 + x2)/2 = 10
yM := (y1 + y2)/2 = 2.5
a1 := (y2 - y1)/(x2 - x1) = 0.0833333
a2 := -1/a1
b1 := y1 - a1*x1 = 1.66667
b2 := yM - a2*xM
fAB(xINDEX) := a1*xINDEX + b1
fCD(xINDEX) := a2*xINDEX + b2
Given
xF := 0
a2*xF + b2 == 8
[x3; y3] := [Find(xF); 8]
C := [x3; y3] = [9.54167; 8]
# Поворот системы вокруг точки C:
aroundCS := π/2
M1 := [cos(aroundCS), -sin(aroundCS); sin(aroundCS), cos(aroundCS)]
[xR1; yR1] := M1*(A - [x3; y3]) + [x3; y3] = [15.5417; 2.45833]
[xR2; yR2] := M1*(B - [x3; y3]) + [x3; y3] = [14.5417; 14.4583]
a1R := (yR2 - yR1)/(xR2 - xR1) = -12
b1R := yR1 - a1R*xR1 = 188.958
fABR(xINDEX) := a1R*xINDEX + b1R
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# График
