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# Задание 20
# Задаем координаты вершин пирамиды и положения камеры:
PIR := [8, 0, 0, 0; 0, 0, 0, 15; 0, 12, 0, 0; 1, 1, 1, 1]
PV := [1; 30; 60]
I0 := 10
# Получаем сферические координаты точки наблюдения:
r_v := PV[0] = 1
ϕ_v := PV[1]*π/180 = 0.523599
θ_v := PV[2]*π/180 = 1.0472
# Формируем матрицу пересчета мировых координат в видовые
K_view := [
    -sin(ϕ_v), cos(ϕ_v), 0, 0;
    -cos(θ_v)*cos(ϕ_v), -cos(θ_v)*sin(ϕ_v), sin(θ_v), 0;
    -sin(θ_v)*cos(ϕ_v), -sin(θ_v)*sin(ϕ_v), -cos(θ_v), r_v;
    0, 0, 0, 1
]
# Вычисляем координаты вершин пирамиды в видовой системе координат (ВСК)
# Интенсивность света, попадающего в точку наблюдения при отражении от каждой грани пирамиды при диффузной модели освещения:
PIR_V := K_view*PIR
# Определяем координаты проекции вершин пирамиды на картинную плоскость
# Вычисляем декартовы координаты вектора внешней нормали к каждой грани пирамиды
# координат вектора AC | координаты вектора AB
# координаты вектора BC
P_XY := stack(transpose(transpose(PIR_V)[:, 0]), transpose(transpose(PIR_V)[:, 1]), transpose(transpose(PIR_V)[:, 3])) = [-4, 0, 0, 12.9904; -3.4641, 10.3923, 0, -3.75; 1, 1, 1, 1]
# Определяем габаритную область проекции пирамиды на плоскость XY ВСК – картинную плоскость
AC := [PIR[:, 0][0]; PIR[:, 0][1]; PIR[:, 0][2]] - [PIR[:, 2][0]; PIR[:, 2][1]; PIR[:, 2][2]] = [8; 0; 0]
BC := [PIR[:, 1][0]; PIR[:, 1][1]; PIR[:, 1][2]] - [PIR[:, 2][0]; PIR[:, 2][1]; PIR[:, 2][2]] = [0; 0; 12]
AB := [PIR[:, 1][0]; PIR[:, 1][1]; PIR[:, 1][2]] - [PIR[:, 0][0]; PIR[:, 0][1]; PIR[:, 0][2]] = [-8; 0; 12]
x_L := min(transpose(P_XY)[:, 0])
y_H := max(transpose(P_XY)[:, 1])  # координаты вектора AD
# – левый верхний угол | координаты вектора BD
x_L = -4
y_H = 10.3923
AD := [PIR[:, 0][0]; PIR[:, 0][1]; PIR[:, 0][2]] - [PIR[:, 3][0]; PIR[:, 3][1]; PIR[:, 3][2]] = [8; -15; 0]
BD := [PIR[:, 1][0]; PIR[:, 1][1]; PIR[:, 1][2]] - [PIR[:, 3][0]; PIR[:, 3][1]; PIR[:, 3][2]] = [0; -15; 12]
x_H := max(transpose(P_XY)[:, 0])
y_L := min(transpose(P_XY)[:, 1])
# – правый нижний угол
x_H = 12.9904
y_L = -3.75
NADC := AC×AD = [0; 0; -120]
NABC := AB×AC = [0; 96; 0]
# Вычисляем декартовы координаты камеры (вектора,
# определяющего положение камеры)
# Вычисляем декартовы координаты источника света
[xa, xb, xc, xd; ya, yb, yc, yd; q, q, q, q] := P_XY = [-4, 0, 0, 12.9904; -3.4641, 10.3923, 0, -3.75; 1, 1, 1, 1]
NADB := AB×AD = [180; 96; 120]
PL := [1; 45; 30]
# Формируем массивы координат X и Y для рисования пирамиды
R_C := [r_v*sin(θ_v)*cos(ϕ_v); r_v*sin(θ_v)*sin(ϕ_v); r_v*cos(θ_v)] = [0.75; 0.433013; 0.5]  # Получаем сферические координаты источника света:
NBDC := BC×BD = [180; 0; 0]
X := transpose([xa, xb, xc, xa, xd, xb, xd, xc])
Kd := 1
rL := PL[0] = 1
ϕL := PL[1]*π/180 = 0.785398
θL := PL[2]*π/180 = 0.523599
Y := transpose([ya, yb, yc, ya, yd, yb, yd, yc])
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RL := [rL*sin(θL)*cos(ϕL); rL*sin(θL)*sin(ϕL); rL*cos(θL)] = [0.353553; 0.353553; 0.866025]
cosinusADC := (vectorize(RL) - vectorize(R_C))*vectorize(NADC)/(sqrt((R_C[0] - RL[0])^2 + (R_C[1] - RL[1])^2 + (R_C[2] - RL[2])^2)*sqrt(NADC[0]^2 + NADC[1]^2 + NADC[2]^2)) = -0.671117
cosinusADB := (vectorize(RL) - vectorize(R_C))*vectorize(NADB)/(sqrt((R_C[0] - RL[0])^2 + (R_C[1] - RL[1])^2 + (R_C[2] - RL[2])^2)*sqrt(NADB[0]^2 + NADB[1]^2 + NADB[2]^2)) = -0.27165
cosinusBDC := (vectorize(RL) - vectorize(R_C))*vectorize(NBDC)/(sqrt((R_C[0] - RL[0])^2 + (R_C[1] - RL[1])^2 + (R_C[2] - RL[2])^2)*sqrt(NBDC[0]^2 + NBDC[1]^2 + NBDC[2]^2)) = -0.726895
cosinusABC := (vectorize(RL) - vectorize(R_C))*vectorize(NABC)/(sqrt((R_C[0] - RL[0])^2 + (R_C[1] - RL[1])^2 + (R_C[2] - RL[2])^2)*sqrt(NABC[0]^2 + NABC[1]^2 + NABC[2]^2)) = -0.145691
IADC := I0*Kd*|cosinusADC| = 6.71117
IADB := I0*Kd*|cosinusADB| = 2.7165
IBDC := I0*Kd*|cosinusBDC| = 7.26895
IABC := I0*Kd*|cosinusABC| = 1.45691
