# Задание 21 (задания 21 и 23 имею одинаковые условия)
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xINDEX := -20 .. 40
# Координаты точек
C(x(AC == BC), 8)
A(5, 2)
B(15, 3)
[x1; y1] := [5; 2]
[x2; y2] := [15; 3]
A := [x1; y1]
B := [x2; y2]
xM := (x1 + x2)/2 = 10
yM := (y1 + y2)/2 = 2.5
a1 := (y2 - y1)/(x2 - x1) = 0.1
a2 := -1/a1
b1 := y1 - a1*x1 = 1.5
b2 := yM - a2*xM
fAB(xINDEX) := a1*xINDEX + b1
fCD(xINDEX) := a2*xINDEX + b2
Given
xF := 0
a2*xF + b2 == 8
[x3; y3] := [Find(xF); 8]
C := [x3; y3] = [9.45; 8]
# Поворот системы вокруг точки C:
aroundCS := π/2
M1 := [cos(aroundCS), -sin(aroundCS); sin(aroundCS), cos(aroundCS)]
[xR1; yR1] := M1*(A - [x3; y3]) + [x3; y3] = [15.45; 3.55]
[xR2; yR2] := M1*(B - [x3; y3]) + [x3; y3] = [14.45; 13.55]
a1R := (yR2 - yR1)/(xR2 - xR1) = -10
b1R := yR1 - a1R*xR1 = 158.05
fABR(xINDEX) := a1R*xINDEX + b1R
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# График
