# Задание 3
# Координаты точек
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A(5, 8)
B(9, 15)
C(13, 7)
x1 := 5
x2 := 9
x3 := 13
y1 := 8
y2 := 15
y3 := 7
# Точка пересечения высот
k := 0
b := 0
Given
k*x1 + b == y1
k*x2 + b == y2
[k1; b1] := Find(k, b) = [1.75; -0.75]
Given
k*x1 + b == y1
k*x3 + b == y3
[k2; b2] := Find(k, b) = [-0.125; 8.625]
k1P := -1/k1 = -0.571429
k2P := -1/k2 = 8
Given
k1P*x3 + b == y3
b1P := Find(b) = 14.4286
Given
k2P*x2 + b == y2
b2P := Find(b) = -57
x := 0
y := 0
Given
y == (k1P*x + b1P)
y == (k2P*x + b2P)
# Новые координаты точек
[x0; y0] := Find(x, y) - [0; 0] = [8.33333; 9.66667]  # Матрица поворота системы координат М:
M := [cos(π/2), sin(π/2); -sin(π/2), cos(π/2)]
Ap := M*[x1 - x0; y1 - y0] + [x0; y0] = [6.66667; 13]
A := [x1; y1]
B := [x2; y2]
Bp := M*[x2 - x0; y2 - y0] + [x0; y0] = [13.6667; 9]
C := [x3; y3]
Cp := M*[x3 - x0; y3 - y0] + [x0; y0] = [5.66667; 5]
XP1 := 0 .. 25 = [0; 1; 2; 3; 4; 5; 6; 7; 8; 9; 10; 11; 12; 13; 14; 15; 16; 17; 18; 19; 20; 21; 22; 23; 24; 25]
# График
Mab := stack(transpose(A), transpose(B))
MabP := stack(transpose(Ap), transpose(Bp))
Mbc := stack(transpose(B), transpose(C))
MbcP := stack(transpose(Bp), transpose(Cp))
Mca := stack(transpose(C), transpose(A))
McaP := stack(transpose(Cp), transpose(Ap))
xab := Mab[:, 0]
xbc := Mbc[:, 0]
xca := Mca[:, 0]
yab := Mab[:, 1]
ybc := Mbc[:, 1]
yca := Mca[:, 1]
xabP := MabP[:, 0]
xbcP := MbcP[:, 0]
xcaP := McaP[:, 0]
yabP := MabP[:, 1]
ybcP := MbcP[:, 1]
ycaP := McaP[:, 1]
YP1 := (k1P*XP1 + b1P)
YP2 := (k2P*XP1 + b2P)
# Верхняя строка - абсциссы вершин отрезка, нижняя - ординаты
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