# Задание 4
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# Задаем координаты вершин пирамиды и положения камеры:
PIR := [5, 0, 0, 0; 0, 0, 10, 0; 0, 0, 0, 15; 1, 1, 1, 1]
PV := [1; 90; 60]
# Получаем сферические координаты точки наблюдения:
r_v := PV[0] = 1
ϕ_v := PV[1]*π/180 = 1.5708
θ_v := PV[2]*π/180 = 1.0472
# Вычисляем декартовы координаты вектора внешней нормали к каждой грани пирамиды
# Формируем матрицу пересчета мировых координат в видовые | координат вектора AC | координаты вектора AB
# координаты вектора BC
K_view := [
    -sin(ϕ_v), cos(ϕ_v), 0, 0;
    -cos(θ_v)*cos(ϕ_v), -cos(θ_v)*sin(ϕ_v), sin(θ_v), 0;
    -sin(θ_v)*cos(ϕ_v), -sin(θ_v)*sin(ϕ_v), -cos(θ_v), r_v;
    0, 0, 0, 1
]
AC := [PIR[:, 0][0]; PIR[:, 0][1]; PIR[:, 0][2]] - [PIR[:, 2][0]; PIR[:, 2][1]; PIR[:, 2][2]] = [5; -10; 0]
BC := [PIR[:, 1][0]; PIR[:, 1][1]; PIR[:, 1][2]] - [PIR[:, 2][0]; PIR[:, 2][1]; PIR[:, 2][2]] = [0; -10; 0]
AB := [PIR[:, 1][0]; PIR[:, 1][1]; PIR[:, 1][2]] - [PIR[:, 0][0]; PIR[:, 0][1]; PIR[:, 0][2]] = [-5; 0; 0]
# координаты вектора AD
# Вычисляем координаты вершин пирамиды в видовой системе координат (ВСК)
# координаты вектора BD
PIR_V := K_view*PIR
AD := [PIR[:, 0][0]; PIR[:, 0][1]; PIR[:, 0][2]] - [PIR[:, 3][0]; PIR[:, 3][1]; PIR[:, 3][2]] = [5; 0; -15]
BD := [PIR[:, 1][0]; PIR[:, 1][1]; PIR[:, 1][2]] - [PIR[:, 3][0]; PIR[:, 3][1]; PIR[:, 3][2]] = [0; 0; -15]
# Определяем координаты проекции вершин пирамиды на картинную плоскость
P_XY := stack(transpose(transpose(PIR_V)[:, 0]), transpose(transpose(PIR_V)[:, 1]), transpose(transpose(PIR_V)[:, 3])) = [-5, 0, 0, 0; 0, 0, -5, 12.9904; 1, 1, 1, 1]
NADC := AC×AD = [150; 75; 50]
NABC := AB×AC = [0; 0; 50]
# Вычисляем декартовы координаты камеры (вектора,
# определяющего положение камеры)
# Определяем габаритную область проекции пирамиды на плоскость XY ВСК – картинную плоскость
NADB := AB×AD = [0; -75; 0]
x_L := min(transpose(P_XY)[:, 0])
y_H := max(transpose(P_XY)[:, 1])  # – левый верхний угол
R_C := [r_v*sin(θ_v)*cos(ϕ_v); r_v*sin(θ_v)*sin(ϕ_v); r_v*cos(θ_v)] = [0; 0.866025; 0.5]
x_L = -5
y_H = 12.9904
NBDC := BC×BD = [150; 0; 0]
x_H := max(transpose(P_XY)[:, 0])
y_L := min(transpose(P_XY)[:, 1])
# – правый нижний угол
q1 := R_C*NADC
q4 := R_C*NABC
x_H = 6.12303e-16
y_L = -5
s1 := if(q1 ≥ 0, "Грань ADC видима", "Грань ADC невидима")
s4 := if(q4 ≥ 0, "Грань ABC видима", "Грань ABC невидима")
s1 = "Грань ADC видима"
s4 = "Грань ABC видима"
[xa, xb, xc, xd; ya, yb, yc, yd; q, q, q, q] := P_XY = [-5, 0, 0, 0; 0, 0, -5, 12.9904; 1, 1, 1, 1]
▬▬▬▬▬▬▬▬▬▬▬▬▬▬▬▬▬▬▬▬▬▬▬▬▬▬▬▬
q2 := R_C*NADB
# Формируем массивы координат X и Y для рисования пирамиды
s2 := if(q2 ≥ 0, "Грань ADB видима", "Грань ADB невидима")
s2 = "Грань ADB невидима"
X := transpose([xa, xb, xc, xa, xd, xb, xd, xc])
▬▬▬▬▬▬▬▬▬▬▬▬▬▬▬▬▬▬▬▬▬▬▬▬▬▬▬▬
q3 := R_C*NBDC
Y := transpose([ya, yb, yc, ya, yd, yb, yd, yc])
s3 := if(q3 ≥ 0, "Грань BDC видима", "Грань BDC невидима")
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s3 = "Грань BDC видима"
