# Задание 5
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# Координаты точек
A(7, 10)
B(11, 17)
C(15, 9)
x1 := 7
x2 := 11
x3 := 15
y1 := 10
y2 := 17
y3 := 9
# Точка пересечения медиан
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xBCm := (x3 + x2)/2 = 13
yBCm := (y3 + y2)/2 = 13
x0 := (1*x1 + 2*xBCm)/(2 + 1) = 11
y0 := (1*y1 + 2*yBCm)/(2 + 1) = 12
# Новые координаты точек
# Матрица поворота системы координат М:
M := [cos(π/4), -sin(π/4); sin(π/4), cos(π/4)]
A := [x1; y1]
Ap := M*[x1 - x0; y1 - y0] + [x0; y0] = [9.58579; 7.75736]
B := [x2; y2]
Bp := M*[x2 - x0; y2 - y0] + [x0; y0] = [7.46447; 15.5355]
C := [x3; y3]
Cp := M*[x3 - x0; y3 - y0] + [x0; y0] = [15.9497; 12.7071]
# График
Mab := stack(transpose(A), transpose(B))
MabP := stack(transpose(Ap), transpose(Bp))
Mbc := stack(transpose(B), transpose(C))
MbcP := stack(transpose(Bp), transpose(Cp))
Mca := stack(transpose(C), transpose(A))
McaP := stack(transpose(Cp), transpose(Ap))
xbc := Mbc[:, 0]
xca := Mca[:, 0]
xab := Mab[:, 0]
ybc := Mbc[:, 1]
yca := Mca[:, 1]
yab := Mab[:, 1]
xabP := MabP[:, 0]
xbcP := MbcP[:, 0]
xcaP := McaP[:, 0]
yabP := MabP[:, 1]
ybcP := MbcP[:, 1]
ycaP := McaP[:, 1]
# Верхняя строка - абсциссы вершин отрезка, нижняя - ординаты
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XP1 := 0 .. 25 = [0; 1; 2; 3; 4; 5; 6; 7; 8; 9; 10; 11; 12; 13; 14; 15; 16; 17; 18; 19; 20; 21; 22; 23; 24; 25]
YP1 := (k1P*XP1 + b1P)  # error: Эта переменная неопределена.
YP2 := (k2P*XP1 + b2P)  # error: Эта переменная неопределена.
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