# Задание 6
# Координаты точек
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A(4, 7)
B(8, 14)
C(12, 6)
x1 := 4
x2 := 8
x3 := 12
y1 := 7
y2 := 14
y3 := 6
# Точка пересечения перпендикуляра и стороны
k := 0
b := 0
Given
k*x2 + b == y2
k*x3 + b == y3
[k1; b1] := Find(k, b) = [-2; 30]
k1P := -1/k1 = 0.5
Given
k1P*x1 + b == y1
b1P := Find(b) = 5
x := 0
y := 0
Given
y == (k1P*x + b1P)
k1*x + b1 == y
[x0; y0] := Find(x, y) = [10; 10]
# Новые координаты точек
# Матрица поворота системы координат М:
M := [cos(π), -sin(π); sin(π), cos(π)]
Ap := M*[x1 - x0; y1 - y0] + [x0; y0] = [16; 13]
A := [x1; y1]
B := [x2; y2]
Bp := M*[x2 - x0; y2 - y0] + [x0; y0] = [12; 6]
C := [x3; y3]
Cp := M*[x3 - x0; y3 - y0] + [x0; y0] = [8; 14]
# График
Mab := stack(transpose(A), transpose(B))
MabP := stack(transpose(Ap), transpose(Bp))
Mbc := stack(transpose(B), transpose(C))
MbcP := stack(transpose(Bp), transpose(Cp))
Mca := stack(transpose(C), transpose(A))
McaP := stack(transpose(Cp), transpose(Ap))
xP1 := -5 .. 25 = [
    -5; -4; -3; -2; -1; 0; 1; 2; 3; 4
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]
xbc := Mbc[:, 0]
xca := Mca[:, 0]
xab := Mab[:, 0]
ybc := Mbc[:, 1]
yca := Mca[:, 1]
yab := Mab[:, 1]
xabP := MabP[:, 0]
xbcP := MbcP[:, 0]
xcaP := McaP[:, 0]
yabP := MabP[:, 1]
ybcP := MbcP[:, 1]
ycaP := McaP[:, 1]
# Верхняя строка - абсциссы вершин отрезка, нижняя - ординаты
a := (k1P*xP1 + b1P)
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