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xINDEX := -20 .. 20  # Задание 7
# Координаты точек
A(6, 7)
B(10, 14)
C(14, 6)
E(6, 4)
D(12, 10)
x1 := 6
x2 := 10
x3 := 14
x4 := 6
x5 := 12
y1 := 7
y2 := 14
y3 := 6
y4 := 4
y5 := 10
a1 := (y2 - y1)/(x2 - x1) = 1.75
a2 := (y3 - y1)/(x3 - x1) = -0.125
a3 := (y3 - y2)/(x3 - x2) = -2
b1 := x1 - a1*y1 = -6.25
b2 := x1 - a2*y1 = 6.875
b3 := x2 - a3*y2 = 38
fAB(xINDEX) := a1*xINDEX + b1
fAC(xINDEX) := a2*xINDEX + b2
fBC(xINDEX) := a3*xINDEX + b3
a4 := (y5 - y4)/(x5 - x4) = 1
b4 := x4 - a4*y4 = 2
fED(xINDEX) := a4*xINDEX + b4
# Точка пересечения прямых
xx := 0
fABED(xx) := fED(xx) - fAB(xx)
fACED(xx) := fED(xx) - fAC(xx)
x0ABED := root(fABED(xx), xx) = 11
x0ACED := root(fACED(xx), xx) = 4.33333
y0ABED := fED(x0ABED) = 13
y0ACED := fED(x0ACED) = 6.33333
fBCED(xx) := fED(xx) - fBC(xx)
x0BCED := root(fBCED(xx), xx) = 12
y0BCED := fED(x0BCED) = 14
# График
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