# Задание 8
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# Задаем координаты вершин пирамиды и положения камеры:
PIR := [5, 0, 0, 0; 0, 0, 0, 10; 0, 10, 0, 0; 1, 1, 1, 1]
PV := [1; 60; 30]
I0 := 10
# Получаем сферические координаты точки наблюдения:
r_v := PV[0] = 1
ϕ_v := PV[1]*π/180 = 1.0472
θ_v := PV[2]*π/180 = 0.523599
# Формируем матрицу пересчета мировых координат в видовые
# Интенсивность света, попадающего в точку наблюдения при отражении от каждой грани пирамиды при диффузной модели освещения:
K_view := [
    -sin(ϕ_v), cos(ϕ_v), 0, 0;
    -cos(θ_v)*cos(ϕ_v), -cos(θ_v)*sin(ϕ_v), sin(θ_v), 0;
    -sin(θ_v)*cos(ϕ_v), -sin(θ_v)*sin(ϕ_v), -cos(θ_v), r_v;
    0, 0, 0, 1
]  # Вычисляем декартовы координаты вектора внешней нормали к каждой грани пирамиды
# координат вектора AC | координаты вектора AB
# координаты вектора BC
# Вычисляем координаты вершин пирамиды в видовой системе координат (ВСК)
AC := [PIR[:, 0][0]; PIR[:, 0][1]; PIR[:, 0][2]] - [PIR[:, 2][0]; PIR[:, 2][1]; PIR[:, 2][2]] = [5; 0; 0]
BC := [PIR[:, 1][0]; PIR[:, 1][1]; PIR[:, 1][2]] - [PIR[:, 2][0]; PIR[:, 2][1]; PIR[:, 2][2]] = [0; 0; 10]
AB := [PIR[:, 1][0]; PIR[:, 1][1]; PIR[:, 1][2]] - [PIR[:, 0][0]; PIR[:, 0][1]; PIR[:, 0][2]] = [-5; 0; 10]
PIR_V := K_view*PIR
# Определяем координаты проекции вершин пирамиды на картинную плоскость
# координаты вектора AD
# координаты вектора BD
P_XY := stack(transpose(transpose(PIR_V)[:, 0]), transpose(transpose(PIR_V)[:, 1]), transpose(transpose(PIR_V)[:, 3])) = [-4.33013, 0, 0, 5; -2.16506, 5, 0, -7.5; 1, 1, 1, 1]
AD := [PIR[:, 0][0]; PIR[:, 0][1]; PIR[:, 0][2]] - [PIR[:, 3][0]; PIR[:, 3][1]; PIR[:, 3][2]] = [5; -10; 0]
BD := [PIR[:, 1][0]; PIR[:, 1][1]; PIR[:, 1][2]] - [PIR[:, 3][0]; PIR[:, 3][1]; PIR[:, 3][2]] = [0; -10; 10]
# Определяем габаритную область проекции пирамиды на плоскость XY ВСК – картинную плоскость
x_L := min(transpose(P_XY)[:, 0])
y_H := max(transpose(P_XY)[:, 1])  # – левый верхний угол
NADC := AC×AD = [0; 0; -50]
x_L = -4.33013
y_H = 5
NABC := AB×AC = [0; 50; 0]
# Вычисляем декартовы координаты камеры (вектора,
# определяющего положение камеры)
NADB := AB×AD = [100; 50; 50]
x_H := max(transpose(P_XY)[:, 0])
y_L := min(transpose(P_XY)[:, 1])  # – правый нижний угол
R_C := [r_v*sin(θ_v)*cos(ϕ_v); r_v*sin(θ_v)*sin(ϕ_v); r_v*cos(θ_v)] = [0.25; 0.433013; 0.866025]
x_H = 5
y_L = -7.5
NBDC := BC×BD = [100; 0; 0]
Kd := 1
[xa, xb, xc, xd; ya, yb, yc, yd; q, q, q, q] := P_XY = [-4.33013, 0, 0, 5; -2.16506, 5, 0, -7.5; 1, 1, 1, 1]
cosinusADC := (vectorize(R_C)*vectorize(NADC))/(sqrt(R_C[0]^2 + R_C[1]^2 + R_C[2]^2)*sqrt(NADC[0]^2 + NADC[1]^2 + NADC[2]^2)) = -0.866025
# Формируем массивы координат X и Y для рисования пирамиды
X := transpose([xa, xb, xc, xa, xd, xb, xd, xc])
cosinusADB := (vectorize(R_C)*vectorize(NADB))/(sqrt(R_C[0]^2 + R_C[1]^2 + R_C[2]^2)*sqrt(NADB[0]^2 + NADB[1]^2 + NADB[2]^2)) = 0.734454
Y := transpose([ya, yb, yc, ya, yd, yb, yd, yc])
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cosinusBDC := (vectorize(R_C)*vectorize(NBDC))/(sqrt(R_C[0]^2 + R_C[1]^2 + R_C[2]^2)*sqrt(NBDC[0]^2 + NBDC[1]^2 + NBDC[2]^2)) = 0.25
cosinusABC := (vectorize(R_C)*vectorize(NABC))/(sqrt(R_C[0]^2 + R_C[1]^2 + R_C[2]^2)*sqrt(NABC[0]^2 + NABC[1]^2 + NABC[2]^2)) = 0.433013
IADC := I0*Kd*cosinusADC = -8.66025
IADB := I0*Kd*cosinusADB = 7.34454
IBDC := I0*Kd*cosinusBDC = 2.5
IABC := I0*Kd*cosinusABC = 4.33013
