xINDEX := -20 .. 40  # Задание 9
# Координаты точек
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A(6, 7)
B(10, 16)
C(14, 5)
E(5, 3)
D(8, 12)
x1 := 6
x2 := 10
x3 := 14
x4 := 5
x5 := 8
y1 := 7
y2 := 16
y3 := 5
y4 := 3
y5 := 12
a1 := (y2 - y1)/(x2 - x1) = 2.25
a2 := (y3 - y1)/(x3 - x1) = -0.25
a3 := (y3 - y2)/(x3 - x2) = -2.75
b1 := x1 - a1*y1 = -9.75
b2 := x1 - a2*y1 = 7.75
b3 := x2 - a3*y2 = 54
fAB(xINDEX) := a1*xINDEX + b1
fAC(xINDEX) := a2*xINDEX + b2
fBC(xINDEX) := a3*xINDEX + b3
a4 := (y5 - y4)/(x5 - x4) = 3
b4 := x4 - a4*y4 = -4
fED(xINDEX) := a4*xINDEX + b4
# Точка пересечения прямых
xx := 0
fABED(xx) := fED(xx) - fAB(xx)
fACED(xx) := fED(xx) - fAC(xx)
x0ABED := root(fABED(xx), xx) = -7.66667
x0ACED := root(fACED(xx), xx) = 3.61538
y0ABED := fED(x0ABED) = -27
y0ACED := fED(x0ACED) = 6.84615
fBCED(xx) := fED(xx) - fBC(xx)
x0BCED := root(fBCED(xx), xx) = 10.087
y0BCED := fED(x0BCED) = 26.2609
# График
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